<neuroml xmlns="http://www.neuroml.org/schema/neuroml2"  xmlns:xs="http://www.w3.org/2001/XMLSchema" xmlns:xsi="http://www.w3.org/2001/XMLSchema-instance" xsi:schemaLocation="http://www.neuroml.org/schema/neuroml2 https://raw.github.com/NeuroML/NeuroML2/development/Schemas/NeuroML2/NeuroML_v2beta4.xsd" id="ChannelWorm_SLO2_4_1">
    <ionChannelHH id="ChannelWorm_SLO2_4_1" conductance="10pS" species="K">

        <annotation>
            <rdf:RDF xmlns:rdf="http://www.w3.org/1999/02/22-rdf-syntax-ns#" xmlns:bqmodel="http://biomodels.net/model-qualifiers/" xmlns:bqbiol="http://biomodels.net/biology-qualifiers/">
                <!-- This is an ion channel model NeuroML2 file generated by ChannelWorm: https://github.com/openworm/ChannelWorm -->
                <rdf:Description rdf:about="ChannelWorm_SLO2_4_1">
                    <bqmodel:isDerivedFrom>
                        <rdf:Bag>
                            <rdf:li rdf:resource="ChannelWorm channel Name: SLO2 channel ID: 4, ModelID: 1"/>
                        </rdf:Bag>
                    </bqmodel:isDerivedFrom>
                    <bqmodel:isDescribedBy>
                        <rdf:Bag>
                            <!-- DOI: 10.1038/77670, PubMed ID: 10903569
                                 SLO-2, a K+ channel with an unusual Cl- dependence. (Yuan A; Dourado M; Butler A; Walton N; Wei A; Salkoff L. Nat. Neurosci., 3(8):771-9) -->
                            <rdf:li rdf:resource="http://identifiers.org/pubmed/10903569"/>
                        </rdf:Bag>
                    </bqmodel:isDescribedBy>
                    <bqbiol:hasTaxon>
                        <rdf:Bag>
                            <!-- Known species: caenorhabditis elegans; taxonomy id: 6239 -->
                            <rdf:li rdf:resource="http://identifiers.org/taxonomy/6239"/>
                        </rdf:Bag>
                    </bqbiol:hasTaxon>
                </rdf:Description>
            </rdf:RDF>
        </annotation>

        <gateHHtauInf id="vda" instances="1">
            <timeCourse type="fixedTimeCourse" tau="0.000707626688985 s"/>
            <steadyState midpoint="-0.0774236324266 V" rate="1" scale="0.0307524845004 V" type="HHSigmoidVariable"/>
        </gateHHtauInf>
    </ionChannelHH>
</neuroml>
